// SBML level 3 version 2

model __main()

  // Compartments:
  compartment extracellular = 1;
  compartment cytosol = 1;

  // Species:
  species B in cytosol = 1/cytosol;
  species C in cytosol = 1/cytosol;
  species D in cytosol = 1/cytosol;
  species E in cytosol = 1/cytosol;
  species F in cytosol = 1/cytosol;
  species G in cytosol = 1/cytosol;
  species H in cytosol = 1/cytosol;
  species I in cytosol = 1/cytosol;
  species L in cytosol = 1/cytosol;
  species M in cytosol = 1/cytosol;
  species N in cytosol = 1/cytosol;
  species O in cytosol = 1/cytosol;
  species R in cytosol = 1/cytosol;

  // Reactions:
  v1: -> B; 1;
  v2: B -> R; 1;
  v3: R -> ; 1;
  v4: B -> C; 1;
  v5: C -> D; 1;
  v6: D -> E; 1;
  v7: E -> ; 1;
  v8: D -> F; 1;
  v9: D -> G; 1;
  v10: G -> H; 1;
  v11: H -> I; 1;
  v12: I -> ; 1;
  v13: F -> ; 1;
  v14: F -> L; 1;
  v15: L -> M; 1;
  v16: M -> N; 1;
  v17: N -> O; 1;
  v18: O -> ; 1;
  v19: O -> ; 1;
end
